*Heading
** Job name: 0422_H48_02 Model name: Model-2
** Generated by: Abaqus/CAE 2022
*Preprint, echo=NO, model=NO, history=NO, contact=NO
**
** PARTS
**
*Part, name=Adhesive_Hole
*Node
      1,          48.,          60.,           0.
      2,          48.,          38.,           0.
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*Element, type=COH3D8
  1, 291, 313,  91,  90, 607, 629, 108, 109
  2, 313, 314,  92,  91, 629, 630, 107, 108
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*Nset, nset=_PickedSet17, internal, generate
    1,  1428,     1
*Elset, elset=_PickedSet17, internal, generate
   1,  650,    1
** Section: Adhesive
*Cohesive Section, elset=_PickedSet17, controls=EC-2, material=Cohesive0422-03, response=TRACTION SEPARATION, thickness=SPECIFIED
0.5,
*End Part
**
*Part, name=DSS_Hole
*Node
      1,           0.,          30.,           5.
      2,        -120.,          30.,           5.
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*Element, type=C3D8R
  1,  117,  953, 5675,  897,    1,   38,  853,   63
  2,  953,  954, 5676, 5675,   38,   39,  854,  853
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*Nset, nset=_PickedSet31, internal, generate
     1,  10738,      1
*Elset, elset=_PickedSet31, internal, generate
    1,  8514,     1
** Section: DSS
*Solid Section, elset=_PickedSet31, material=DSS1
,
*End Part
**
*Part, name=GFRP_Hole
*Node
      1,         120.,          38.,           1.
      2,         120.,          38.,           0.
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*Element, type=C3D8R
 1,  165,  175, 2504, 2449,    1,    2,  116,  137
 2, 2449, 2504, 2505, 2450,  137,  116,  117,  136
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*Nset, nset=_PickedSet88, internal, generate
     1,  11268,      1
*Elset, elset=_PickedSet88, internal, generate
    1,  8755,     1
*Orientation, name=Ori-1
          1.,           0.,           0.,           0.,           1.,           0.
3, 0.
** Section: GFRP
*Solid Section, elset=_PickedSet88, orientation=Ori-1, controls=EC-1, material=VUMAT-GFRP-0422-02
,
*End Part
**
*Part, name=Part-4
*Node
      1,           0.,    7.9000001,         15.5
      2,    7.9000001,           0.,         15.5
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*Element, type=C3D8R
  1, 237, 238, 747, 738,  18,  17, 178, 177
  2, 238, 239, 748, 747,  17,  16, 179, 178
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*Nset, nset=_PickedSet7, internal, generate
    1,  1392,     1
*Elset, elset=_PickedSet7, internal, generate
    1,  1062,     1
** Section: Bolt
*Solid Section, elset=_PickedSet7, material=Bolts2_Preload
,
*End Part
**
**
** ASSEMBLY
**
*Assembly, name=Assembly
**
*Instance, name=DSS_Hole-1, part=DSS_Hole
       -360.,          30.,          5.5
       -360.,          30.,          5.5,        -360.,          30.,          6.5,         180.
*End Instance
**
*Instance, name=GFRP_Hole-1, part=GFRP_Hole
        352.,          30.,           0.
        352.,          30.,           0.,         352.,          30.,           1.,         180.
*End Instance
**
*Instance, name=Adhesive_Hole-2, part=Adhesive_Hole
        -48.,          30.,          5.5
        -48.,          30.,          5.5,         -47.,          30.,          5.5,         180.
*End Instance
**
*Instance, name=Part-4-2, part=Part-4
         0.1,           0.,           0.
         0.1,           0.,           0.,          0.1,           0.,           1.,         180.
*End Instance
**
*Node
      1,         352.,         -15.,          2.5
*Node
      2,        -352.,         -15.,         10.5
*Nset, nset=Bolt_HalfHalf, instance=Part-4-2, generate
    1,  1392,     1
*Elset, elset=Bolt_HalfHalf, instance=Part-4-2, generate
    1,  1062,     1
*Nset, nset=LSD1, instance=DSS_Hole-1
 25,
*Nset, nset=LSD2, instance=GFRP_Hole-1
 70,
*Nset, nset=Quart1, instance=DSS_Hole-1
    1,    2,    3,    4,   12,   13
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*Nset, nset=Quart1, instance=GFRP_Hole-1
    5,    6,    7,    8,   11,   12
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*Nset, nset=Quart1, instance=Adhesive_Hole-2
   3,   4,   9,  10,  13,  14
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*Nset, nset=Quart1, instance=Part-4-2
   2,   3,   4,   6,   7,   8
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*Elset, elset=Quart1, instance=DSS_Hole-1
    1,    2,    3,    4,    5,    6
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*Elset, elset=Quart1, instance=GFRP_Hole-1
   61,   62,   63,   64,   65,   66
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*Elset, elset=Quart1, instance=Adhesive_Hole-2
  55,  56,  57,  58,  59,  60
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*Elset, elset=Quart1, instance=Part-4-2
   13,   19,   25,   31,   42,   48
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*Nset, nset=Quart2, instance=GFRP_Hole-1
   71,   72,   73,   74,   77,   80
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*Nset, nset=Quart2, instance=Part-4-2
   4,   5,   6,   8,  54,  55
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*Elset, elset=Quart2, instance=GFRP_Hole-1
 4794, 4795, 4796, 4797, 4798, 4799
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*Elset, elset=Quart2, instance=Part-4-2
 112, 116, 120, 124, 128, 132
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*Nset, nset=RP_Fixed
 2,
*Nset, nset=RP_Loaded
 1,
*Nset, nset=_PickedSet131, internal, instance=DSS_Hole-1
    1,    2,    3,    4,    5,    6
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*Nset, nset=_PickedSet131, internal
 2,
*Elset, elset=_PickedSet131, internal, instance=DSS_Hole-1
    1,    2,    3,    4,    5,    6
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*Nset, nset=_PickedSet184, internal, instance=GFRP_Hole-1
    3,    4,    6,    7,    9,   11
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*Elset, elset=_PickedSet184, internal, instance=GFRP_Hole-1
   12,   24,   36,   48,   60,   72
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*Elset, elset=_Half_cohesive1_S1, internal, instance=Adhesive_Hole-2, generate
   1,  650,    1
*Surface, type=ELEMENT, name=Half_cohesive1
_Half_cohesive1_S1, S1
*Elset, elset=_Half_cohesive2_S2, internal, instance=Adhesive_Hole-2, generate
   1,  650,    1
*Surface, type=ELEMENT, name=Half_cohesive2
_Half_cohesive2_S2, S2
*Elset, elset=_Half_tie1_S3, internal, instance=DSS_Hole-1
 4362, 4363, 4364, 4365, 4366, 4367
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*Elset, elset=_Half_tie1_S4, internal, instance=DSS_Hole-1
 4410, 4411, 4412, 4413, 4934, 4935
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*Surface, type=ELEMENT, name=Half_tie1
_Half_tie1_S3, S3
_Half_tie1_S4, S4
*Elset, elset=_Half_tie2_S5, internal, instance=GFRP_Hole-1
 5850, 5851, 5852, 5853, 5854, 5855
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*Elset, elset=_Half_tie2_S1, internal, instance=GFRP_Hole-1
 8126, 8127, 8128, 8129, 8130, 8131
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*Surface, type=ELEMENT, name=Half_tie2
_Half_tie2_S5, S5
_Half_tie2_S1, S1
*Surface, type=NODE, name=_PickedSet131_CNS_, internal
_PickedSet131, 1.
** Constraint: RP_Fixed
*Coupling, constraint name=RP_Fixed, ref node=RP_Fixed, surface=_PickedSet131_CNS_
*Kinematic
** Constraint: Tie1
*Tie, name=Tie1, adjust=yes, position tolerance=0.5, type=SURFACE TO SURFACE
Half_tie1, Half_cohesive1
** Constraint: Tie2
*Tie, name=Tie2, adjust=yes, position tolerance=0.5, type=SURFACE TO SURFACE
Half_tie2, Half_cohesive2
*End Assembly
**
** ELEMENT CONTROLS
**
*Section Controls, name=EC-1, DISTORTION CONTROL=YES, ELEMENT DELETION=YES, MAX DEGRADATION=1., hourglass=ENHANCED
1., 1., 1.
*Section Controls, name=EC-2, ELEMENT DELETION=YES, MAX DEGRADATION=0.99
1., 1., 1.
*Amplitude, name=Amp-1, definition=SMOOTH STEP
             0.,              0.,            0.01,              1.
*Amplitude, name=Amp-2, definition=SMOOTH STEP
             0.,              0.,             0.1,              1.
**
** MATERIALS
**
*Material, name=Bolts2_Preload
*Density
 7.9e-09,
*Elastic
193000., 0.3
*Expansion
 1e-05,
*Plastic
650.,   0.
850., 0.15
*Material, name=Cohesive0420
*Damage Initiation, criterion=QUADS
 55.8,50.,50.
*Damage Evolution, type=ENERGY, mixed mode behavior=POWER LAW, power=1.
 0.5, 2.1, 2.1
*Density
 1.4e-09,
*Elastic, type=TRACTION
3200.,1850.,1850.
*Material, name=Cohesive0422
*Damage Initiation, criterion=QUADS
 21.63, 17.9, 17.9
*Damage Evolution, type=ENERGY, mixed mode behavior=POWER LAW, power=1.
 0.43, 4.7, 4.7
*Density
 1.4e-09,
*Elastic, type=TRACTION
3700.,1120.,1120.
*Material, name=Cohesive0422-03
*Damage Initiation, criterion=QUADS
 21.63, 17.9, 17.9
*Damage Evolution, type=ENERGY, mixed mode behavior=POWER LAW, power=1.
 0.43, 2.1, 2.1
*Density
 1.4e-09,
*Elastic, type=TRACTION
4120.,1540.,1540.
*Material, name=Cohesive1
*Damage Initiation, criterion=QUADS
31.,20.,20.
*Damage Evolution, type=ENERGY
 0.3255,
*Density
 1.4e-09,
*Elastic, type=TRACTION
3200., 1185.2, 1185.2
*Material, name=DSS1
*Density
 7.85e-09,
*Elastic
200000., 0.3
*Plastic
612.,0.
*Material, name=VUMAT-GFRP
*Density
 1.921e-09,
*Depvar, delete=15
     22,
*User Material, constants=16
 0.0126, 0.0029, 0.0155, 0.0109, 0.0229, 0.0129, 0.0129, 42700.
 12072., 12072., 0.2629, 0.2629,   0.21,  4090.,  4090.,  4320.
*Material, name=VUMAT-GFRP-0422-02
*Density
 1.921e-09,
*Depvar, delete=15
     22,
*User Material, constants=16
 0.0157, 0.0741, 0.0029, 0.0264, 0.0365, 0.0222, 0.0222, 42700.
 12072., 12072., 0.2629, 0.2629,   0.21,  4090.,  4090.,  4320.
**
** INTERACTION PROPERTIES
**
*Surface Interaction, name=Fraction
*Friction
 0.3,
*Surface Behavior, pressure-overclosure=HARD
**
** BOUNDARY CONDITIONS
**
** Name: BC-1 Type: Symmetry/Antisymmetry/Encastre
*Boundary
RP_Fixed, ENCASTRE
** Name: BC-3 Type: Symmetry/Antisymmetry/Encastre
*Boundary
Quart1, YSYMM
** Name: BC-4 Type: Symmetry/Antisymmetry/Encastre
*Boundary
Quart2, ZSYMM
**
** PREDEFINED FIELDS
**
** Name: Predefined Field-1   Type: Temperature
*Initial Conditions, type=TEMPERATURE
Bolt_HalfHalf, 0.
**
** INTERACTIONS
**
** Interaction: Int-1
*Contact, op=NEW
*Contact Inclusions, ALL EXTERIOR
*Contact Property Assignment
 ,  , Fraction
** ----------------------------------------------------------------
**
** STEP: Step-Pre
**
*Step, name=Step-Pre, nlgeom=YES
*Dynamic, Explicit
, 0.01
*Bulk Viscosity
0.06, 1.2
** Mass Scaling: Semi-Automatic
**               Whole Model
*Fixed Mass Scaling, dt=5e-08, type=below min
**
** PREDEFINED FIELDS
**
** Name: Predefined Field-2   Type: Temperature
*Temperature, amplitude=Amp-1
Bolt_HalfHalf, -12.
**
** OUTPUT REQUESTS
**
*Restart, write, number interval=1, time marks=NO
**
** FIELD OUTPUT: F-Output-1
**
*Output, field, number interval=300
*Node Output
A, RF, U, V
*Element Output, directions=YES
DAMAGEC, DAMAGEFC, DAMAGEFT, DAMAGEMC, DAMAGEMT, DAMAGESHR, DAMAGET, EVF, LE, PE, PEEQ, PEEQVAVG, PEVAVG, S, SDEG, SDV
STATUS, SVAVG
*Contact Output
CSTRESS,
**
** HISTORY OUTPUT: H-Output-1
**
*Output, history, variable=PRESELECT, frequency=1
*End Step
** ----------------------------------------------------------------
**
** STEP: Step-Core
**
*Step, name=Step-Core, nlgeom=YES
*Dynamic, Explicit
, 0.1
*Bulk Viscosity
0.06, 1.2
** Mass Scaling: Semi-Automatic
**               Whole Model
*Fixed Mass Scaling, dt=5e-08, type=below min
**
** BOUNDARY CONDITIONS
**
** Name: BC-2 Type: Displacement/Rotation
*Boundary, amplitude=Amp-2
_PickedSet184, 1, 1, 8.
**
** OUTPUT REQUESTS
**
*Restart, write, number interval=1, time marks=NO
**
** FIELD OUTPUT: F-Output-1
**
*Output, field, number interval=300
*Node Output
A, RF, U, V
*Element Output, directions=YES
DAMAGEC, DAMAGEFC, DAMAGEFT, DAMAGEMC, DAMAGEMT, DAMAGESHR, DAMAGET, EVF, LE, PE, PEEQ, PEEQVAVG, PEVAVG, S, SDEG, SDV
STATUS, SVAVG
*Contact Output
CSTRESS,
**
** HISTORY OUTPUT: H-Output-1
**
*Output, history, variable=PRESELECT, frequency=1
*End Step
